# Вариант 8 | Task 1
sqrt(100) = 10
|-10| = 10
10! = 3628800
a := 3.4
b := 6.22
c ≡ 0.149
Z := (2*a*b + nthroot(c, 3))/sqrt((a^2 + b^(a + c))*c) = 4.29283
N := e^sin(c)*cos(a/b) = 0.990999
# ^^^ пять знаков
π float, 250 → 3.141592653589793238462643383279502884197169399375105820974944592307816406286208998628034825342117067982148086513282306647093844609550582231725359408128481117450284102701938521105559644622948954930381964428810975665933446128475648233786783165271201909
Z1 := -3 + 2i
Z2 := 1 + 2i
Z3 := 3 + 4i
|Z1| = 3.60555
Re(Z1) = -3
Im(Z1) = 2
arg(Z1) = 2.55359
i := 1 .. 10
sum(i, i) = 55
product(i + 1, i) = 39916800
integral(x^2*log(x + 2), x = 0 .. 0.4) = 0.00771149
integral(tan(2*x)^-1/sin(2*x)^2, x = 0.8 .. 1.2) = -0.297731
x := 2
d/dx(x^5) = 80
d/dx(sin(x)) = -0.416147
# Task 2
y(x) := acos(x^2 - b^2)/asin(x^2 - a^2)
[m, a, b, h] := [3, -5, 5, 0.8]
x := a, a + h .. b = [-5; -4.2; -3.4; -2.6; -1.8; -1; -0.2; 0.6; 1.4; 2.2; 3; 3.8; 4.6]
y(x) = [1.19018 + 0.386644i; 1.64293 + 0.225138i; 884279719003555 - 1.12404e15i; -1.8969 - 0.0719518i; -1.63239 - 0.205631i; -1.54021 - 0.236954i; -1.50968 - 0.245651i; -1.51939 - 0.242976i; -1.57554 - 0.225849i; -1.72619 - 0.165893i; -2.28594 + 0.282019i; 2.14025 - 0.128132i; 1.38009 + 0.329843i]
# Task 3
K := [-3; 2; 5]
N := [-2; -4; 0]
M := [4; -3; 7]
NK := K - N = [-1; 6; 5]
NM := M - N = [6; 1; 7]
# K
# /  |
# /  |
# /  |
# /  |
# N------------------M
cosKNM := NK*NM/(|NK|*|NM|) = 0.479317
sinKNM := sin(acos(cosKNM)) = 0.877642
KX := sinKNM*|NK| = 6.91056
