# Вариант 8
# Task 1
0 ≤ x ≤ 1
f(x) := sqrt(1 - x) - tan(x)
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_tol := TOL
TOL := 10^-4
rough_root := -5
root(f(rough_root), rough_root) = -5.09718
TOL := _tol
# Task 2
g_(x) := x^4 - 7*x^3 + 7*x^2 - 5*x + 100
coeffs := g_(x) coeffs → [100; -5; 7; -7; 1]
polyroots(coeffs) = [-1 + 2i; -1 - 2i; 4; 5]
g_(x) solve → [4; 5; -1 + 2i; -1 - 2i]
# Task 3
Given
2*x1 - 3*x3 - 2*x4 == -16
2*x1 - x2 + 13*x3 + x4 == 213
3*x1 + x2 + 2*x3 + x4 == 72
x1 - 12*x3 - 5*x4 == -159
[x1, x2, x3, x4] := [0, 0, 0, 0]
Find(x1, x2, x3, x4) = [13.1818; 3.90909; 14.7273; -0.909091]
mat := [2, 0, -3, -2; 2, -1, 13, 1; 3, 1, 2, 1; 1, 0, -12, -5]
frees := [-16; 213; 72; -159]
lsolve(mat, frees) = [13.1818; 3.90909; 14.7273; -0.909091]
# Task4
f1(x) := cos(x + 0.5) == y + 2 solve, y → cos(x + 0.5) - 2
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f2(y) := sin(y - 2*x) == 1 solve, x → 3*π/4 + y/2
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x := 1.5
y := -2.5
Given
cos(x + 0.5) == y + 2
sin(y - 2*x) == 1
Minerr(x, y) = [1.26145; -2.1895]
# Lab .2
# Task 1
F1(x) :=
    if x ≤ 0
        y ← -8*x*sin(x)/e^sqrt(|x|)
        z ← 8/(-x)
    otherwise
        y ← 0.8*x/|sin(x)| + cos(x - π/3)
        z ← 2*x/sqrt(x^3 - 1)
    return (3*y + x^2*z)/π
F1(-2.34) = 3.17687
F1(5.65) = 15.7636
# Task 2
F2(v, n) :=
    sum ← 0
    for i ∈ 0, 2 .. n - 1
        sum ← sum + v[i]
    return sum
F2([1; 555; 1; 555; 5; 555; 1; 555], 8) = 8
