# Вариант 8 | Task 1
π float, 7 → 3.141593
12.345667 float, 3 → 12.3
# Task 2
sqrt(-7) complex → 0 + sqrt(7)*1i
e^(1 + π*1i/4) complex → sqrt(2)*e/2 + sqrt(2)*e/2*1i simplify → sqrt(2)*e*(1/2 + 1/2*1i)
# Task 3
g_(x) := x^4 + 5*x^3 + 7*x^2 + 7*x - 20
g_(x) factor → (x - 1)*(x + 4)*(x^2 + 2*x + 5)
temp(y, z) := g_(x) substitute, x == y + z → 7*y + 7*z + 7*(y + z)^2 + 5*(y + z)^3 + (y + z)^4 - 20
temp(y, z) := temp(y, z) expand → y^4 + 4*y^3*z + 5*y^3 + 6*y^2*z^2 + 15*y^2*z + 7*y^2 + 4*y*z^3 + 15*y*z^2 + 14*y*z + 7*y + z^4 + 5*z^3 + 7*z^2 + 7*z - 20
temp(y, z) collect, z → z^4 + (4*y + 5)*z^3 + (6*y^2 + 15*y + 7)*z^2 + (4*y^3 + 15*y^2 + 14*y + 7)*z + y^4 + 5*y^3 + 7*y^2 + 7*y - 20
# Task4
(6*x^2 - x + 1)/(x^3 - x) parfrac → 3/(x - 1) - 1/x + 4/(x + 1)
(3*x^2 - 2)/((x^2 + x + 1)^2*(x - 3)) parfrac → (14*x + 17)/(13*(x^2 + x + 1)^2) - (25*x + 100)/(169*(x^2 + x + 1)) + 25/(169*(x - 3))
z(x) := (x - 1)^3 expand → x^3 - 3*x^2 + 3*x - 1
(x + 1)/x(x - 1)^3 parfrac →  # error: Выражение должно быть рациональной функцией.
(x + 1)/(x*z(x)) parfrac → 1/(x - 1) - 1/x - 1/(x - 1)^2 + 2/(x - 1)^3
(5*x^2 - 4*x + 16)/((x^2 - x + 1)^2*(x - 3)) parfrac → 1/(x - 3) - (x + 2)/(x^2 - x + 1) - (2*x + 3)/(x^2 - x + 1)^2
# Task 5
ln(1 + x) series, x, 6 → x - x^2/2 + x^3/3 - x^4/4 + x^5/5 - x^6/6
sin(x)^2 series, x, 6 → x^2 - x^4/3 + 2*x^6/45
# Task 6
f(x) := tan(2*x)^-1/sin(2*x)^2  # Task 7
d^1/dx^1(f(x)) → -4*cos(2*x)/(sin(2*x)^3*tan(2*x)) - (2*tan(2*x)^2 + 2)/(sin(2*x)^2*tan(2*x)^2)
integral(f(x), x) → (cos(4*x) - 1)/(cos(8*x) - 4*cos(4*x) + 3)
d^2/dx^2(f(x)) → 8/(sin(2*x)^2*tan(2*x)) + 24*cos(2*x)^2/(sin(2*x)^4*tan(2*x)) - 8*(tan(2*x)^2 + 1)/(sin(2*x)^2*tan(2*x)) + 8*cos(2*x)*(tan(2*x)^2 + 1)/(sin(2*x)^3*tan(2*x)^2) + 4*(tan(2*x)^2 + 1)*(2*tan(2*x)^2 + 2)/(sin(2*x)^2*tan(2*x)^3) + 4*cos(2*x)*(2*tan(2*x)^2 + 2)/(sin(2*x)^3*tan(2*x)^2)
# Task 8
[1, y; x, 2]^-1 → [-2/(x*y - 2), y/(x*y - 2); x/(x*y - 2), -1/(x*y - 2)]
transpose([1, a, b; x, 2, c; x^2, 3, d]) → [1, x, x^2; a, 2, 3; b, c, d]
det([1, a, b; x, 2, c; x^2, 3, d]) → 2*d - 3*c - 2*b*x^2 + 3*b*x - a*d*x + a*c*x^2
# Task 9
limit((sqrt(1 + 2*x) - 3)/(sqrt(x) - 2), x → 4) → 4/3
limit((sqrt(1 - x) - 3)/(2 + nthroot(x, 3)), x → -8) → -2
limit((x^2 - 1)/ln(x), x → 1) → 2
limit((sqrt(x^2 - x + 1) - 1)/ln(x), x → 1) → 1/2
# Task 10
sum(6/(9*n^2 + 12*n - 5), n = 1 .. ∞) → 7/10
sum(24/(9*n^2 - 12*n - 5), n = 2 .. ∞) → 5
# Task 11
y1(x) := (4*x + 1)/(16*x^2 + 8*x + 3) + 1/sqrt(2)*atan((4*x + 1)/sqrt(2))
d^1/dx^1(y1(x)) → 4/(16*x^2 + 8*x + 3) + 2/((4*x + 1)^2/2 + 1) - (4*x + 1)*(32*x + 8)/(16*x^2 + 8*x + 3)^2 simplify → 16/(16*x^2 + 8*x + 3)^2
y2(x) := 2/(x - 1)*sqrt(2*x - x^2) + ln((1 + sqrt(2*x - x^2))/(x - 1))
d^1/dx^1(y2(x)) → -2*sqrt(2*x - x^2)/(x - 1)^2 - (x - 1)*((sqrt(2*x - x^2) + 1)/(x - 1)^2 + (2*x - 2)/(2*sqrt(2*x - x^2)*(x - 1)))/(sqrt(2*x - x^2) + 1) - (2*x - 2)/(sqrt(2*x - x^2)*(x - 1)) simplify → -(x + 1)/(sqrt(2*x - x^2)*(x - 1)^2)
# Task 12
integral((4*x - 2)*cos(2*x), x) → cos(2*x) - sin(2*x) + 2*x*sin(2*x)
integral((3*x + 4)*e^(3*x), x) → e^(3*x)*(x + 1)
# Task 13
integral((x^2 + 5*x + 6)*cos(2*x), x = -2 .. 0) = 1.60261
integral((x^2 - 4)*cos(3*x), x = -2 .. 0) = 0.44744
